// COMSOL Multiphysics 6.1.0.282 model "task3.mph"
// Outline of the model tree

Geometry
  geom1 "Geometry 1" (2D, length unit m)
    r1: Rectangle | pos = {0, 1.5}; base = center; size = {0.4, 3}
    r2: Rectangle | pos = {0, 4.5}; base = center; size = {0.2, 3}
    uni1: Union | input = r1, r2; intbnd = off; edge = all
    r3: Rectangle | pos = {0, 3}; base = center; size = {8, 6}
    fin: Finalize "Form Union"

Materials
  mat1: Common "Water, liquid" on domains 2
    def "Basic"
      thermalexpansioncoefficient = alpha_p(T)
      bulkviscosity = muB(T)
      dynamicviscosity = eta(T)
      ratioofspecificheat = gamma_w(T)
      electricconductivity = 5.5e-6[S/m]
      heatcapacity = Cp(T)
      density = rho(T)
      thermalconductivity = k(T)
      soundspeed = cs(T)
      eta: Piecewise
        arg = T
        pieces = 
          {273.15, 413.15, 1.3799566804-0.021224019151*T^1+1.3604562827E-4*T^2-4.6454090319E-7*T^3+8.9042735735E-10*T^4-9.0790692686E-13*T^5+3.8457331488E-16*T^6}
          {413.15, 553.75, 0.00401235783-2.10746715E-5*T^1+3.85772275E-8*T^2-2.39730284E-11*T^3}
        argunit = K
        fununit = Pa*s
      Cp: Piecewise | arg = T; pieces = {273.15, 553.75, 12010.1471-80.4072879*T^1+0.309866854*T^2-5.38186884E-4*T^3+3.62536437E-7*T^4}; argunit = K; fununit = J/(kg*K)
      rho: Piecewise
        arg = T
        smooth = contd1
        pieces = 
          {273.15, 293.15, 6.3092789034e-05*T^3-0.0603676398829*T^2+18.9229382407066*T-950.704055329848}
          {293.15, 373.15, 1.0335053319e-05*T^3-0.0133950656345*T^2+4.96928883266*T+432.257114008512}
        argunit = K
        fununit = kg/m^3
      k: Piecewise | arg = T; pieces = {273.15, 553.75, -0.869083936+0.00894880345*T^1-1.58366345E-5*T^2+7.97543259E-9*T^3}; argunit = K; fununit = W/(m*K)
      cs: Interpolation | table = {{273, 1403}, {278, 1427}, {283, 1447}, {293, 1481}, {303, 1507}, {313, 1526}, {323, 1541}, {333, 1552}, {343, 1555}, {353, 1555}, {363, 1550}, {373, 1543}}; interp = piecewisecubic; fununit = m/s; argunit = K
      an1: Analytic | funcname = alpha_p; expr = -1/rho(T)*d(rho(T),T); args = T; fununit = 1/K; argunit = K
      an2: Analytic | funcname = gamma_w; expr = 1+(T/Cp(T))*(alpha_p(T)*cs(T))^2; args = T; fununit = 1; argunit = K
      an3: Analytic | funcname = muB; expr = 2.79*eta(T); args = T; fununit = Pa*s; argunit = K
  mat2: Common "Soil [solid]" on domains 1, 3
    def "Basic"
      thermalconductivity = k(T)
      heatcapacity = C(T)
      TD = TD(T)
      k: Piecewise
        arg = T
        pieces = 
          {293.0, 475.0, 0.0747638+1.451056E-4*T^1}
          {475.0, 525.0, 139.2152-1.028413*T^1+0.002851159*T^2-3.513043E-6*T^3+1.623188E-9*T^4}
        argunit = K
        fununit = W/(m*K)
      C: Piecewise
        arg = T
        pieces = 
          {293.0, 525.0, 2.32023594+0.0192117272*T^1}
          {525.0, 550.0, 90.8078206-0.14933332*T^1}
          {550.0, 600.0, -0.128124456+0.0160000009*T^1}
        argunit = K
        fununit = J/(kg*K)
      TD: Piecewise | arg = T; pieces = {293.0, 625.0, 1.812386E-7-6.00003E-10*T^1+8.89304E-13*T^2-4.005955E-16*T^3}; argunit = K; fununit = m^2/s
  mat3: Common "Gasoline"
    def "Basic"
      dynamicviscosity = eta(T)
      heatcapacity = Cp(T)
      density = rho(T)
      thermalconductivity = k(T)
      eta: Piecewise
        arg = T
        pieces = 
          {223.0, 333.0, 0.324353602-0.00537461379*T^1+3.59844043E-5*T^2-1.20923936E-7*T^3+2.03268518E-10*T^4-1.36463565E-13*T^5}
          {333.0, 473.0, 0.0131006893-1.09480193E-4*T^1+3.54223845E-7*T^2-5.17530271E-10*T^3+2.85912005E-13*T^4}
        argunit = K
        fununit = Pa*s
      Cp: Piecewise | arg = T; pieces = {293.0, 473.0, 1118.75206+1.7995872*T^1+0.00479876161*T^2}; argunit = K; fununit = J/(kg*K)
      rho: Piecewise | arg = T; pieces = {293.0, 473.0, 869.056455-0.0385817485*T^1-0.00125534424*T^2}; argunit = K; fununit = kg/m^3
      k: Piecewise | arg = T; pieces = {223.0, 473.0, 0.176151-2.03216216E-4*T^1}; argunit = K; fununit = W/(m*K)
  mat4: Common "Gasoline" on no domains
    // same settings as mat3

Physics
  tds: DilutedSpecies "Transport of Diluted Species" on all domains
    dependent variable c
    cdm1: ConvectionDiffusionMigration "Transport Properties 1" (default)
      u = {0, -1e-7, 0}
      DiffusionMaterialList = mat1
      D_c = 0.7e-9[m^2/s]
    nflx1: NoFlux (default)
    init1: init "Initial Values 1" (default)
    mbc1: MassBasedConcentrations on all domains
    conc1: Concentration on boundaries 3, 8, 11 | species = 1; c0 = 0.01
    conc2: Concentration on boundaries 2, 5, 13 | species = 1
    cdm2: ConvectionDiffusionMigration "Transport Properties 2" on domains 1, 3
      DiffusionMaterialList = mat2
      D_c = 1e-12[m^2/s]

Mesh
  mesh1 "Mesh 1" (physics-controlled)

Studies
  std1 "Study 1"
    time: Transient "Time Dependent" | tunit = d; tlist = range(0,365,365*100)

Solver configurations
  sol1 "Solution 1" (study std1)
    v1: Variables "Dependent Variables 1"
    t1: Time "Time-Dependent Solver 1" | tlist = range(0,365,365*100); rtol = 0.005; maxorder = 2; stabcntrl = on
      fc1: FullyCoupled
        linsolver = d1
        maxiter = 8
        damp = 0.9
        jtech = once
        stabacc = aacc
        aaccdim = 5
        aaccmix = 0.9
        aaccdelay = 1
      d1: Direct "Direct, concentrations (tds)" | linsolver = pardiso; pivotperturb = 1.0E-13

Datasets
  dset1: Solution | solution = sol1

Plots
  pg1: PlotGroup2D "Concentration (tds)" | data = dset1
    surf1: Surface | expr = c
    str1: Streamline | expr = {tds.tflux_cx, tds.tflux_cy}; pointtype = arrow; arrowlength = logarithmic