// COMSOL Multiphysics 6.1.0.282 model "task7_.mph"
// Outline of the model tree

Geometry
  geom1 "Geometry 1" (2D, length unit m)
    pol1: Polygon
      source = table
      table = 
        {-0.6, 0}
        {0.6, 0}
        {0.6, 0.5}
        {0.45, 0.55}
        {0.15, 0.187380957603}
        {-0.1, 0.187380957603}
        {-0.45, 0.55}
        {-0.6, 0.5}
        {-0.6, 0}
    pol2: Polygon | type = open; source = table; table = {{-0.45, 0.55}, {-0.6, 0.5}}
    fin: Finalize "Form Union"

Materials
  mat1: Common "Steel AISI 4340" on domains 1
    def "Basic"
      relpermeability = 1
      electricconductivity = 4.032e6[S/m]
      thermalexpansioncoefficient = 12.3e-6[1/K]
      heatcapacity = 475[J/(kg*K)]
      relpermittivity = 1
      density = 7850[kg/m^3]
      thermalconductivity = 44.5[W/(m*K)]
    Enu "Young's modulus and Poisson's ratio"
      E = 205[GPa]
      nu = 0.28

Physics
  solid: SolidMechanics on all domains
    dependent variable u = {u, v, w}
    lemm1: LinearElasticModel "Linear Elastic Material 1" (default) | MixedFormulation = none
    free1: Free (default)
    init1: init "Initial Values 1" (default) | ut = {0, 0, 0}
    bndl1: BoundaryLoad on boundaries 3, 7 | FperArea = {0, -200000, 0}
    fix1: Fixed "Fixed Constraint 1" on boundaries 2

Mesh
  mesh1 "Mesh 1" (physics-controlled)
    size: MeshSizeDefault | hauto = 1

Studies
  std1 "Study 1"
    stat: Stationary

Solver configurations
  sol1 "Solution 1" (study std1)
    v1: Variables "Dependent Variables 1"
    s1: Stationary "Stationary Solver 1"
      dDef: Direct
      fc1: FullyCoupled | linsolver = dDef

Datasets
  dset1: Solution | solution = sol1

Plots
  pg1: PlotGroup2D "Stress (solid)" | data = dset1
    surf1: Surface | expr = solid.mises
      def: Deform "Deformation" | expr = {u, v}; descr = Displacement field